VAX := READPRN("C:\Users\1\Desktop\OA\Diod_mA.DAT")
Id1 := max(VAX[:, 1])/4 = 0.29075
Id2 := max(VAX[:, 1])/2 = 0.5815
Id3 := max(VAX[:, 1]) = 1.163
VAX[:, 0] = [
    0; 0.03999; 0.07998; 0.12; 0.16; 0.2; 0.24; 0.2799; 0.3199; 0.3599
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]
VAX[:, 1] = [
    0; 1.6e-5; 3.199e-5; 4.799e-5; 6.399e-5; 7.998e-5; 9.598e-5; 0.000112; 0.000128; 0.000144
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]
Ud1 := linterp(VAX[:, 1], VAX[:, 0], Id3/4) = 0.801787
Ud2 := linterp(VAX[:, 1], VAX[:, 0], Id3/2) = 0.819742
Ud3 := linterp(VAX[:, 1], VAX[:, 0], Id3) = 0.8377
Rb := (Ud1 - 2*Ud2 + Ud3)/Id1 = 1.17132e-5
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NFt := ((3*Ud2 - 2*Ud1) - Ud3)/ln(2) = 0.0258984
Is0 := Id1*exp((Ud2 - 2*Ud1)/NFt) = 2.08602e-14
length(VAX[:, 0]) = 51
Imax := max(VAX[:, 1]) = 1.163
Rb := 1
Is0 := 0.0000001
m := 2
Ft := 0.02
Ud4 := 0.754
Id4 := 0.04613
Given
Ud1 == Id1*Rb + ln((Is0 + Id1)/Is0)*m*Ft
Ud2 == Id2*Rb + ln((Is0 + Id2)/Is0)*m*Ft
Ud3 == Id3*Rb + ln((Is0 + Id3)/Is0)*m*Ft
Ud4 == Id4*Rb + ln((Is0 + Id4)/Is0)*m*Ft
Diod_P := Minerr(Is0, Rb, m, Ft) = [0; -8.5642e-5; 1.60965; 0.0161299]
Idiod := 0, 10^-2 .. 1.163
Rb1 := Diod_P[1]
Is01 := Diod_P[0]
NFt1 := Diod_P[2]*Diod_P[3]
Uformula(Idiod) := Idiod*Rb1 + NFt1*ln((Idiod + Is01)/Is01)
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