Id3 := 0.02
Id2 := 0.01
Id1 := 0.005
Ud3 := 0.472
Ud2 := 0.433
Ud1 := 0.397
Rb := (Ud1 - 2*Ud2 + Ud3)/Id1 = 0.6
NFt := ((3*Ud2 - 2*Ud1) - Ud3)/ln(2) = 0.0476089
I[0] := Id1*exp((Ud2 - 2*Ud1)/NFt) = 2.54615e-6
Id := 0.005, 0.01 .. 0.02
Ud(Id) := Id*Rb + NFt*ln((Id + I[0])/I[0])
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