VAR := READPRN("C:\Users\1\Desktop\lab_02\lab_02 Peak_X(V(OUT),1,1) vs VVAR.ANO")
VAR = [
    1, 490321;
    4, 496322;
    7, 498339;
    10, 499455;
    13, 500189;
    16, 500706;
    19, 501106;
    22, 501422;
    25, 501672;
    28, 501906;
    30, 502022
]
Vvar := VAR[:, 0]
Fmax := VAR[:, 1]
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Lk := 10^-3
Ck := 10^-10
pi := 3.1415926
Fr := Fmax
Cd := -(Ck - 1/(4*Fr^2*pi^2)/Lk) = [5.36079e-12; 2.82851e-12; 1.99786e-12; 1.54223e-12; 1.24467e-12; 1.03581e-12; 8.74555e-13; 7.47169e-13; 6.46771e-13; 5.53202e-13; 5.06467e-13]
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VJ0 := 0.7
CJ0 := 8*10^-10
M := 0.4
Given
Cd[1] == (CJ0*(VJ0/(VJ0 + Vvar[1]))^M)
Cd[3] == (CJ0*(VJ0/(VJ0 + Vvar[3]))^M)
Cd[5] == (CJ0*(VJ0/(VJ0 + Vvar[5]))^M)
Cd[7] == (CJ0*(VJ0/(VJ0 + Vvar[7]))^M)
Minerr(CJ0, VJ0, M) = [5.44716e-12; 6.02406; 1.28722]
