VAX := READPRN("C:\Users\1\Desktop\ЛР_3_10\LR3.lvm")
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VAX = [
    -0.0471079, 5.43437e-6;
    -0.0271079, 6.62709e-6;
    -0.00710791, 7.8198e-6;
    0.0128921, 9.01251e-6;
    0.0328921, 1.02052e-5;
    0.0528921, 1.9836e-5;
    0.0728921, 4.83067e-5;
    0.0928921, 7.67775e-5;
    0.112892, 0.000105248;
    0.132892, 0.000133719;
    0.152892, 0.00016219;
    0.172892, 0.000190661;
    0.192892, 0.000219131;
    0.212892, 0.000247602;
    0.232892, 0.000440974;
    0.252892, 0.000667899;
    0.272892, 0.000894825;
    0.292892, 0.00112175;
    0.312892, 0.00157557;
    0.332892, 0.00223179;
    0.352892, 0.0031561;
    0.372892, 0.00447628
]
Ud := VAX[:, 0]
Id := VAX[:, 1]
Rb := 0.001
Is0 := 0.0000001
m := 0.02
Ft := 0.02
Given
Ud[10] == Id[10]*Rb + ln((Is0 + Id[10])/Is0)*m*Ft
Ud[15] == Id[15]*Rb + ln((Is0 + Id[15])/Is0)*m*Ft
Ud[17] == Id[17]*Rb + ln((Is0 + Id[17])/Is0)*m*Ft
Ud[5] == Id[5]*Rb + ln((Is0 + Id[5])/Is0)*m*Ft
Diod_P := Minerr(Is0, Rb, m, Ft) = [1.52151e-5; 26.2465; 2.11559; 0.0289779]
Idiod := VAX[:, 1]
Rb1 := Diod_P[1]
Is01 := Diod_P[0]
NFt1 := Diod_P[2]*Diod_P[3]
Uformula(Idiod) := Idiod*Rb1 + NFt1*ln((Idiod + Is01)/Is01)
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