VAX := READPRN("C:\Users\1\Desktop\ЛР_4_10\LR4.txt")
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VAX = [1, 195349; 3.25, 228090; 5.5, 246857; 7.75, 260133; 10, 270412]
Lk := 10^-3
Ck := 10^-10
Frez := VAX[:, 1]
Cd := (1/(4*Frez^2*π^2*Lk))
Cd = [6.6377e-10; 4.86887e-10; 4.15671e-10; 3.74325e-10; 3.46408e-10]
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Cj := 10^-12
Vj := 0.6
M := 0.39
Given
Cd == Cj*(1 - (-VAX)[:, 0]/Vj)^(-M)
# 0 < Vj < 0.75
1/3 < M < 1/2
Find(Cj, Vj, M) = [1.11541e-12; 0.819381; 0.333333]
